a := 3
b := 6
z := a*b
z = 18
i := 1, 1.5 .. 6
y(x) := sin(x)
x := -2*π, -1.8*π .. 2*π
c := y(0.2)
i = [1; 1.5; 2; 2.5; 3; 3.5; 4; 4.5; 5; 5.5; 6]
x = [-6.28319; -5.65487; -5.02655; -4.39823; -3.76991; -3.14159; -2.51327; -1.88496; -1.25664; -0.628319; 0; 0.628319; 1.25664; 1.88496; 2.51327; 3.14159; 3.76991; 4.39823; 5.02655; 5.65487; 6.28319]
y(x) = [0; 0.587785; 0.951057; 0.951057; 0.587785; 0; -0.587785; -0.951057; -0.951057; -0.587785; 0; 0.587785; 0.951057; 0.951057; 0.587785; 0; -0.587785; -0.951057; -0.951057; -0.587785; 0]
c = 0.198669
y1(x) := cos(x)
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A := [1, 2, 3; 4, 5, 6; 7, 8, 9]
V := [1; 2; 3]
B := [-1, 2, -7; 10, 9, 5; 56, 2, 5]
V1 := transpose(V)
Z := A*B
V1 = [1, 2, 3]
Z = [187, 26, 18; 382, 65, 27; 577, 104, 36]
d := |B|
d = 3813
B2 := B^-1
B2 = [
    0.00917912, -0.00629426, 0.019145;
    0.06032, 0.101495, -0.0170469;
    -0.126934, 0.0298977, -0.00760556
]
a1 := B2[2, 2]
a1 = -0.00760556
i := 0, 1 .. 5
i = [0; 1; 2; 3; 4; 5]
t2[i, 0] := i
t2 = [0; 1; 2; 3; 4; 5]
t2[i, 1] := i^2
t2 = [0, 0; 1, 1; 2, 4; 3, 9; 4, 16; 5, 25]
