# Координаты прямой AB:
X_AB := [2; 5]
Y_AB := [12; 9]
# Координаты прямой CD:
X_CD := [2; 5]
Y_CD := [3; 6]
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# Найдем точку пересечения прямых
Given
Y_AB[0] == k1*X_AB[0] + b1
Y_AB[1] == k1*X_AB[1] + b1
k1 := -1
b1 := 14
Find(k1, b1) → [-1; 14]
y == k1*x + b1  # уравнение прямой AB
Given
Y_CD[1] == k2*X_CD[0] + b2
Y_CD[0] == k2*X_CD[1] + b2
k2 := 1
b2 := 1
Find(k2, b2) → [-1; 8]
y == k1*x + b2  # уравнение прямой CD
Given
y == k1*x + b1
y == k2*x + b2
Find(x, y) → [13/2; 15/2]
Px := 13/2
Py := 15/2  # координаты точки пересечения прямых
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# Исходные координаты:
P := [X_AB[0], X_AB[1], X_CD[0], X_CD[1]; Y_AB[0], Y_AB[1], Y_CD[0], Y_CD[1]; 1, 1, 1, 1] = [2, 5, 2, 5; 12, 9, 3, 6; 1, 1, 1, 1]
# Матрица перемещения СК:
Ts(dx, dy) := [1, 0, -dx; 0, 1, -dy; 0, 0, 1]
# Матрица поворота СК:
Rs(φ) := [cos(φ), sin(φ), 0; -sin(φ), cos(φ), 0; 0, 0, 1]
φ := 180
φ_rad := φ*π/180 = 3.14159
# 1. Сместим СК в точку P:
A1 := Ts(Px, Py)*P = [-4.5, -1.5, -4.5, -1.5; 4.5, 1.5, -4.5, -1.5; 1, 1, 1, 1]
# 2. Повернем смещенную СК на 180 градусов:
A2 := Rs(φ_rad)*A1 = [4.5, 1.5, 4.5, 1.5; -4.5, -1.5, 4.5, 1.5; 1, 1, 1, 1]
# 3. Вернем готовую СК в исходное положение:
A3 := Ts(-Px, -Py)*A2 = [11, 8, 11, 8; 3, 6, 12, 9; 1, 1, 1, 1]
# Повернутая на 180 прямая AB:
X_AB_New := [11; 8]
Y_AB_New := [3; 6]
# Повернутая на 180 прямая CD:
X_CD_New := [11; 8]
Y_CD_New := [12; 9]
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